*Heading
** Job name: test2 Model name: Model-1
** Generated by: Abaqus/CAE 2020
*Preprint, echo=NO, model=NO, history=NO, contact=NO
**
** PARTS
**
*Part, name=Part-1
*Node
      1,           0.,           0.,           0.
      2,         400.,           0.,           0.
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*Element, type=B31
 1,  1,  4
 2,  4,  5
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*Element, type=T3D2
 51,   2,  53
 52,  53,  54
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*Nset, nset=_PickedSet2, internal
  1,  2,  4,  5,  6,  7
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*Elset, elset=_PickedSet2, internal, generate
  1,  50,   1
*Nset, nset=_PickedSet3, internal
   2,   3,  53,  54,  55,  56
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*Elset, elset=_PickedSet3, internal, generate
  51,  100,    1
** Section: Section-1  Profile: beam
*Beam Section, elset=_PickedSet2, material=beam, temperature=GRADIENTS, section=CIRC
5.
0.,0.,-1.
** Section: cable
*Solid Section, elset=_PickedSet3, material=cable
3.14159,
*End Part
**
**
** ASSEMBLY
**
*Assembly, name=Assembly
**
*Instance, name=Part-1-1, part=Part-1
*End Instance
**
*Nset, nset=_PickedSet4, internal, instance=Part-1-1
 1, 3
*Nset, nset=_PickedSet5, internal, instance=Part-1-1
 2,
*End Assembly
**
** MATERIALS
**
*Material, name=beam
*Elastic
350000., 0.3
*Material, name=cable
*Elastic
20000., 0.3
*No Compression
** ----------------------------------------------------------------
**
** STEP: Step-1
**
*Step, name=Step-1, nlgeom=NO, inc=10000
*Static
0.001, 1., 1e-07, 1.
**
** BOUNDARY CONDITIONS
**
** Name: BC-1 Type: 对称/反对称/完全固定
*Boundary
_PickedSet4, ENCASTRE
**
** LOADS
**
** Name: Load-1   Type: Concentrated force
*Cload
_PickedSet5, 1, 10.
_PickedSet5, 2, -10.
_PickedSet5, 3, 10.
**
** OUTPUT REQUESTS
**
*Restart, write, frequency=0
**
** FIELD OUTPUT: F-Output-1
**
*Output, field, variable=PRESELECT
**
** HISTORY OUTPUT: H-Output-1
**
*Output, history, variable=PRESELECT
*End Step
